// COMSOL Multiphysics 5.5.0.306 model "5x5graphs.mph"
// Outline of the model tree

Parameters
  H = 10
  W = 1

Geometry
  geom1 "Geometry 1" (2D, length unit mm)
    r1: Rectangle | size = {W, H}
    r2: Rectangle | pos = {10, 0}; size = {W, H}
    r3: Rectangle | size = {H, W}
    r4: Rectangle | pos = {0, -10}; size = {W, H}
    r5: Rectangle | pos = {10, -10}; size = {W, H}
    r6: Rectangle | pos = {0, -10}; size = {H, W}
    r7: Rectangle | pos = {0, -20}; size = {W, H}
    r8: Rectangle | pos = {10, -20}; size = {W, H}
    r9: Rectangle | pos = {0, -20}; size = {H, W}
    r10: Rectangle | pos = {0, -30}; size = {W, H}
    r11: Rectangle | pos = {10, -30}; size = {W, H}
    r12: Rectangle | pos = {0, -30}; size = {H, W}
    r19: Rectangle | pos = {11, 0}; size = {10, 1}
    coi1: Coincident | entity1 = r19(1) points 4; entity2 = r2(1) boundaries 2
    r20: Rectangle | pos = {10, -10}; size = {11, 1}
    coi2: Coincident | entity1 = r20(1) points 4; entity2 = r6(1) points 3
    r21: Rectangle | pos = {11, -20}; size = {10, 1}
    coi3: Coincident | entity1 = r21(1) points 1; entity2 = r8(1) points 2
    r22: Rectangle | pos = {11, -30}; size = {10, 1}
    coi4: Coincident | entity1 = r22(1) points 4; entity2 = r11(1) boundaries 2
    coi5: Coincident | entity1 = r22(1) points 4; entity2 = r12(1) boundaries 3
    r23: Rectangle | pos = {21, -0}; size = {W, H}
    r24: Rectangle | pos = {31, -0}; size = {W, H}
    r25: Rectangle | pos = {21, -0}; size = {H, W}
    r26: Rectangle | pos = {21, -10}; size = {W, H}
    r27: Rectangle | pos = {31, -10}; size = {W, H}
    r28: Rectangle | pos = {21, -10}; size = {H, W}
    r29: Rectangle | pos = {21, -20}; size = {W, H}
    r30: Rectangle | pos = {31, -20}; size = {W, H}
    r31: Rectangle | pos = {21, -20}; size = {H, W}
    r32: Rectangle | pos = {21, -30}; size = {W, H}
    r33: Rectangle | pos = {31, -30}; size = {W, H}
    r34: Rectangle | pos = {21, -30}; size = {H, W}
    r35: Rectangle | pos = {32, -0}; size = {9, 1.1192111968994}
    r36: Rectangle | pos = {31, -10}; size = {10, 1}
    r37: Rectangle | pos = {32, -20}; size = {9, 1}
    r38: Rectangle | pos = {32, -30}; size = {9, 1}
    coi6: Coincident | entity1 = r22(1) points 3; entity2 = r34(1) points 4
    coi7: Coincident | entity1 = r21(1) points 3; entity2 = r31(1) points 4
    coi8: Coincident | entity1 = r20(1) points 3; entity2 = r28(1) points 4
    coi9: Coincident | entity1 = r19(1) points 3; entity2 = r25(1) points 4
    r39: Rectangle | pos = {41, -30}; size = {1, 40}
    coi10: Coincident | entity1 = r39(1) points 2; entity2 = r38(1) boundaries 1
    r40: Rectangle | pos = {0, 9}; size = {42, 1}
    coi11: Coincident | entity1 = r40(1) points 4; entity2 = r1(1) points 4
    coi12: Coincident | entity1 = r40(1) points 3; entity2 = r39(1) points 3
    r41: Rectangle | pos = {41, -20}; size = {9, 1}
    coi13: Coincident | entity1 = r41(1) points 4; entity2 = r37(1) points 3
    r42: Rectangle | pos = {31, 10}; size = {1, 8}
    coi14: Coincident | entity1 = r42(1) points 2; entity2 = r24(1) points 3
    r43: Rectangle | pos = {-6, -10}; size = {6, 1}
    coi15: Coincident | entity1 = r43(1) points 2; entity2 = r4(1) points 1
    r44: Rectangle | pos = {31, -40}; size = {1, 10}
    coi16: Coincident | entity1 = r44(1) points 4; entity2 = r33(1) points 1
    fin: Finalize "Form Union"

Materials
  mat1: Common "Water" on all domains
    def "Basic"
      thermalexpansioncoefficient = alpha_p(T)
      bulkviscosity = muB(T)
      dynamicviscosity = eta(T)
      ratioofspecificheat = gamma_w(T)
      electricconductivity = 5.5e-6[S/m]
      heatcapacity = Cp(T)
      density = rho(T)
      thermalconductivity = k(T)
      soundspeed = cs(T)
      eta: Piecewise
        arg = T
        pieces = 
          {273.15, 413.15, 1.3799566804-0.021224019151*T^1+1.3604562827E-4*T^2-4.6454090319E-7*T^3+8.9042735735E-10*T^4-9.0790692686E-13*T^5+3.8457331488E-16*T^6}
          {413.15, 553.75, 0.00401235783-2.10746715E-5*T^1+3.85772275E-8*T^2-2.39730284E-11*T^3}
        argunit = K
        fununit = Pa*s
      Cp: Piecewise | arg = T; pieces = {273.15, 553.75, 12010.1471-80.4072879*T^1+0.309866854*T^2-5.38186884E-4*T^3+3.62536437E-7*T^4}; argunit = K; fununit = J/(kg*K)
      rho: Piecewise
        arg = T
        smooth = contd1
        pieces = 
          {273.15, 293.15, 6.3092789034e-05*T^3-0.0603676398829*T^2+18.9229382407066*T-950.704055329848}
          {293.15, 373.15, 1.0335053319e-05*T^3-0.0133950656345*T^2+4.96928883266*T+432.257114008512}
        argunit = K
        fununit = kg/m^3
      k: Piecewise | arg = T; pieces = {273.15, 553.75, -0.869083936+0.00894880345*T^1-1.58366345E-5*T^2+7.97543259E-9*T^3}; argunit = K; fununit = W/(m*K)
      cs: Interpolation | table = {{273, 1403}, {278, 1427}, {283, 1447}, {293, 1481}, {303, 1507}, {313, 1526}, {323, 1541}, {333, 1552}, {343, 1555}, {353, 1555}, {363, 1550}, {373, 1543}}; interp = piecewisecubic; argunit = K; fununit = m/s
      an1: Analytic | funcname = alpha_p; expr = -1/rho(T)*d(rho(T),T); args = T; argunit = K; fununit = 1/K
      an2: Analytic | funcname = gamma_w; expr = 1+(T/Cp(T))*(alpha_p(T)*cs(T))^2; args = T; argunit = K; fununit = 1
      an3: Analytic | funcname = muB; expr = 2.79*eta(T); args = T; argunit = K; fununit = Pa*s

Physics
  spf: LaminarFlow on all domains
    dependent variable u = {u, v, w}
    fp1: FluidProperties (default)
    init1: init "Initial Values 1" (default)
    wallbc1: WallBC "Wall 1" (default)
    inl1: InletBoundary "Inlet 1" on boundaries 134 | U0in = 0.1
    inl2: InletBoundary "Inlet 2" on boundaries 1 | U0in = 0.2
    out1: OutletBoundary "Outlet 1" on boundaries 176
    inl3: InletBoundary "Inlet 3" on boundaries 116 | U0in = 0.1
  tds: DilutedSpecies "Transport of Diluted Species" on all domains
    dependent variable c
    cdm1: ConvectionDiffusionMigration "Transport Properties 1" (default) | u_src = root.comp1.u
    nflx1: NoFlux (default)
    init1: init "Initial Values 1" (default)
    in1: Inflow on boundaries 1
    in2: Inflow on boundaries 134 | c0 = 1
    out1: Outflow on boundaries 176
    in3: Inflow on boundaries 116 | c0 = 0.5

Mesh
  mesh1 "Mesh 1" (physics-controlled)
    size: MeshSizeDefault | table = cfd

Studies
  std1 "Study 1"
    stat: Stationary

Solver configurations
  sol1 "Solution 1" (study std1)
    v1: Variables "Dependent Variables 1"
    s1: Stationary "Stationary Solver 1"
      fc1: FullyCoupled | linsolver = d1; initstep = 0.01; minstep = 1.0E-6; maxiter = 100
      d1: Direct "Direct, fluid flow variables (spf) (merged)" | linsolver = pardiso; pivotperturb = 1.0E-13

Datasets
  dset1: Solution | solution = sol1

Plots
  pg1: PlotGroup2D "Velocity (spf)" | data = dset1
    surf1: Surface | expr = spf.U
  pg2: PlotGroup2D "Pressure (spf)" | data = dset1
    con1: Contour | expr = p; levelrounding = off
  pg3: PlotGroup2D "Concentration (tds)" | data = dset1
    surf1: Surface | expr = c
    str1: Streamline | expr = {tds.tflux_cx, tds.tflux_cy}; pointtype = arrow; arrowlength = logarithmic