// COMSOL Multiphysics 5.5.0.306 model "microfluidic_model_2.mph"
// Outline of the model tree

Geometry
  geom1 "Geometry 1" (2D, length unit m)
    hpipe_0_0: Rectangle | size = {8.0E-5, 1.0E-5}
    vpipe_0_0: Rectangle | size = {1.0E-5, 8.0E-5}
    hpipe_0_1: Rectangle | pos = {0, 8.0E-5}; size = {8.0E-5, 1.0E-5}
    vpipe_0_1: Rectangle "Rectangle 1a" | pos = {0, 8.0E-5}; size = {1.0E-5, 8.0E-5}
    hpipe_0_2: Rectangle "Rectangle 2a" | pos = {0, 1.6E-4}; size = {8.0E-5, 1.0E-5}
    vpipe_0_2: Rectangle "Rectangle 2b" | pos = {0, 1.6E-4}; size = {1.0E-5, 8.0E-5}
    hpipe_0_3: Rectangle | pos = {0, 0.00024}; size = {8.0E-5, 1.0E-5}
    vpipe_0_3: Rectangle "Rectangle 3a" | pos = {0, 0.00024}; size = {1.0E-5, 8.0E-5}
    hpipe_0_4: Rectangle | pos = {0, 3.2E-4}; size = {8.0E-5, 1.0E-5}
    vpipe_0_4: Rectangle "Rectangle 4a" | pos = {0, 3.2E-4}; size = {1.0E-5, 8.0E-5}
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    fin: Finalize "Form Union"

Materials
  mat1: Common "Water" on all domains
    def "Basic"
      density = 1000
      dynamicviscosity = 0.001

Physics
  tds: DilutedSpecies "Transport of Diluted Species" on all domains
    dependent variable c
    cdm1: ConvectionDiffusionMigration "Transport Properties 1" (default)
    nflx1: NoFlux (default)
    init1: init "Initial Values 1" (default)
    inl1: Inflow on boundaries 1 | c0 = 1
    inl2: Inflow on boundaries 82 | c0 = 2
    inl3: Inflow on boundaries 10 | c0 = 3
    int_wall_1: ThinImpermeableBarrier on boundaries 40
    int_wall_2: ThinImpermeableBarrier on boundaries 62
    int_wall_3: ThinImpermeableBarrier on boundaries 172
    int_wall_4: ThinImpermeableBarrier on boundaries 194
    int_wall_5: ThinImpermeableBarrier on boundaries 132
    int_wall_6: ThinImpermeableBarrier on boundaries 154
    int_wall_7: ThinImpermeableBarrier on boundaries 176
    int_wall_8: ThinImpermeableBarrier on boundaries 198
    int_wall_9: ThinImpermeableBarrier on boundaries 136
    int_wall_10: ThinImpermeableBarrier on boundaries 158
    int_wall_11: ThinImpermeableBarrier on boundaries 180
    int_wall_12: ThinImpermeableBarrier on boundaries 202
    int_wall_13: ThinImpermeableBarrier on boundaries 52
    int_wall_14: ThinImpermeableBarrier on boundaries 74
    int_wall_15: ThinImpermeableBarrier on boundaries 96
    int_wall_16: ThinImpermeableBarrier on boundaries 118
    int_wall_17: ThinImpermeableBarrier on boundaries 184
    int_wall_18: ThinImpermeableBarrier on boundaries 206
    int_wall_19: ThinImpermeableBarrier on boundaries 56
    int_wall_20: ThinImpermeableBarrier on boundaries 78
    int_wall_21: ThinImpermeableBarrier on boundaries 144
    int_wall_22: ThinImpermeableBarrier on boundaries 166
    int_wall_23: ThinImpermeableBarrier on boundaries 188
    int_wall_24: ThinImpermeableBarrier on boundaries 210
    int_wall_25: ThinImpermeableBarrier on boundaries 25
    int_wall_26: ThinImpermeableBarrier on boundaries 27
    int_wall_27: ThinImpermeableBarrier on boundaries 33
    int_wall_28: ThinImpermeableBarrier on boundaries 35
    int_wall_29: ThinImpermeableBarrier on boundaries 77
    int_wall_30: ThinImpermeableBarrier on boundaries 79
    int_wall_31: ThinImpermeableBarrier on boundaries 117
    int_wall_32: ThinImpermeableBarrier on boundaries 119
    int_wall_33: ThinImpermeableBarrier on boundaries 201
    int_wall_34: ThinImpermeableBarrier on boundaries 203
    int_wall_35: ThinImpermeableBarrier on boundaries 205
    int_wall_36: ThinImpermeableBarrier on boundaries 207

Mesh
  mesh1 "Mesh 1"
    size: MeshSizeDefault | hmax = 3.15E-5; hmin = 1.41E-7; hcurve = 0.3; hgrad = 1.3
    fmesh: Free on remaining entities
      size: Size on entire geometry | hmax = 4.7E-6; hmin = 9.4E-9; hauto = 1

Studies
  std_1 "Study 1"
    stat: Stationary
  std_2 "Study 2"
    stat: Stationary

Solver configurations
  sol1 "Solution 1" (study std_1)
    v1: Variables "Dependent Variables 1"
    s1: Stationary "Stationary Solver 1"
      fc1: FullyCoupled
      d1: Direct
  sol2 "Solution 2" (study std_2)
    // same settings as sol1

Datasets
  dset1: Solution | solution = sol1
  dest_1: Solution | solution = sol1
  dset2: Solution | solution = sol2
  dest_2: Solution | solution = sol2

Plots
  pg_1: PlotGroup2D "2D Plot Group 1" | data = dest_1
    surf1: Surface | expr = c
  pg_2: PlotGroup2D "2D Plot Group 2" | data = dest_2
    surf1: Surface | expr = c